*Heading
** Guided-wave plate, T300/F593 unidirectional, 100 kHz five-cycle Hann burst.
** Generated by make_abaqus_inp.py. The 500x4x4 line-source form of this
** deck is run in Abaqus 2026 and compared against the in-house solver in
** section 4b of README.md; the element type and the mesh are the two things
** that decide whether that comparison holds.
*Preprint, echo=NO, model=NO, history=NO, contact=NO
**
*Part, name=Part-1
*Node
1, 0.0000000e+00, 0.0000000e+00, 0.0000000e+00
2, 1.0000000e-03, 0.0000000e+00, 0.0000000e+00
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*Element, type=C3D8
1, 1, 2, 503, 502, 2506, 2507, 3008, 3007
2, 2, 3, 504, 503, 2507, 2508, 3009, 3008
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*Elset, elset=ALL, generate
1, 8000, 1
**
** Anisotropic properties REQUIRE an explicit local orientation in
** Abaqus, even when the material axes coincide with the global ones.
** Omitting it is a hard error, not a default: the first successful
** submission attempt failed with Anisotropic material properties
** without a local orientation system. Local 1 runs along the fibres
** (global x), local 2 along y, local 3 through the thickness.
*Orientation, name=Fibre
1., 0., 0., 0., 1., 0.
3, 0.
*Solid Section, elset=ALL, material=CFRP, orientation=Fibre
,
*End Part
**
*Material, name=CFRP
*Density
1570.000,
*Elastic, type=ENGINEERING CONSTANTS
1.281000e+11, 8.200000e+09, 8.200000e+09, 2.700000e-01, 2.700000e-01, 2.000000e-01, 4.700000e+09, 4.700000e+09,
3.440000e+09,
**
*Assembly, name=Assembly
*Instance, name=PLATE-1, part=Part-1
*End Instance
*Nset, nset=RECV, instance=PLATE-1
11203, 11343,
*End Assembly
**
** Five-cycle Hann burst at 100 kHz, sampled every 0.5 us, peak 1.
*Amplitude, name=HANN, time=TOTAL TIME
0.0000000e+00, 0.0000000e+00, 5.0000000e-07, 3.1238192e-04, 1.0000000e-06, 2.3743979e-03, 1.5000000e-06, 7.3410856e-03
2.0000000e-06, 1.5306838e-02, 2.5000000e-06, 2.5073303e-02, 3.0000000e-06, 3.4214134e-02, 3.5000000e-06, 3.9444625e-02
4.0000000e-06, 3.7246168e-02, 4.5000000e-06, 2.4643918e-02, 5.0000000e-06, 1.1981805e-17, 5.5000000e-06, -3.6329269e-02
6.0000000e-06, -8.1612169e-02, 6.5000000e-06, -1.3074011e-01, 7.0000000e-06, -1.7665342e-01, 7.5000000e-06, -2.1117388e-01
8.0000000e-06, -2.2615337e-01, 8.5000000e-06, -2.1478826e-01, 9.0000000e-06, -1.7290765e-01, 9.5000000e-06, -1.0003006e-01
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5.0000000e-05, -1.8818249e-47
**
*Step, name=WAVE, nlgeom=NO
*Dynamic, Explicit
, 2.2000000e-04
*Bulk Viscosity
0.06, 1.2
**
** Loads are applied per node; the amplitude times the terminal value
** gives 1 N per metre of width for the line source, matching the
** in-house model. No boundary conditions: a free plate is admissible
** in explicit dynamics and it is what the reference model solves.
*Cload, amplitude=HANN
PLATE-1.10121, 3, 5.0000000e-03
PLATE-1.10622, 3, 5.0000000e-03
PLATE-1.11123, 3, 5.0000000e-03
PLATE-1.11624, 3, 5.0000000e-03
PLATE-1.12125, 3, 5.0000000e-03
PLATE-1.101, 3, 5.0000000e-03
PLATE-1.602, 3, 5.0000000e-03
PLATE-1.1103, 3, 5.0000000e-03
PLATE-1.1604, 3, 5.0000000e-03
PLATE-1.2105, 3, 5.0000000e-03
**
*Output, field, number interval=110
*Node Output
U, V
*Output, history, time interval=1.0000000e-06
** ALLAE against ALLIE is the hourglass check when reduced integration
** is used; ETOTAL must stay flat once the burst has passed, the plate
** being free and undamped.
*Energy Output
ALLAE, ALLIE, ALLKE, ETOTAL
*Node Output, nset=RECV
U3
*End Step
