*Heading
** Capability test: Hashin + energy evolution on a continuum shell (SC8R), the
** element family the documentation says the criterion does support.
*Preprint, echo=NO, model=NO, history=NO, contact=NO
*Node
1, 0., 0., 0.
2, 1e-3, 0., 0.
3, 1e-3, 1e-3, 0.
4, 0., 1e-3, 0.
5, 0., 0., 5e-4
6, 1e-3, 0., 5e-4
7, 1e-3, 1e-3, 5e-4
8, 0., 1e-3, 5e-4
*Element, type=SC8R
1, 1, 2, 3, 4, 5, 6, 7, 8
*Elset, elset=ALL
1,
*Shell Section, elset=ALL, material=CFRP
5.0e-4, 5
*Material, name=CFRP
*Density
1570.,
*Elastic, type=ENGINEERING CONSTANTS
1.281e11, 8.2e9, 8.2e9, 0.27, 0.27, 0.20, 4.7e9, 4.7e9
3.44e9,
*Damage Initiation, criterion=HASHIN
1.5e9, 1.2e9, 5.0e7, 2.0e8, 7.0e7, 7.0e7
*Damage Evolution, type=ENERGY
9.0e4, 9.0e4, 5.0e2, 1.0e3
*Step, name=S1, nlgeom=NO
*Dynamic, Explicit
, 1e-6
*Output, field
*Node Output
U
*End Step
