*Heading
** Ball-drop impact on a 100 x 100 x 2 mm coupon, 8 plies, contact-based cohesive between
** them, generated by make_impact_wave_inp.py.
** In-plane 1.26895 mm at the edges: set by ten elements per A0 wavelength at
** 100 kHz, the rule the validated wave models use, so one mesh serves both
** stages. In-plane 0.15 mm at the centre, where the ball contacts.
*Preprint, echo=NO, model=NO, history=NO, contact=NO
*Node
1, 4.163336342e-17, 4.163336342e-17, 0
2, 0.001268951545, 4.163336342e-17, 0
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** solid elements, one per ply
*Element, type=C3D8
1, 1, 2, 109, 108, 11450, 11451, 11558, 11557
2, 2, 3, 110, 109, 11451, 11452, 11559, 11558
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** rigid facets of the ball
*Element, type=R3D4
90009, 183186, 183187, 183307, 183306
90010, 183187, 183188, 183308, 183307
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*Element, type=R3D3
89889, 183185, 183187, 183186
89890, 183185, 183188, 183187
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*Element, type=MASS
100689, 193867
*Element, type=ROTARYI
100690, 193867
*Elset, elset=BALLMASS
100689,
*Elset, elset=BALLINERTIA
100690,
*Elset, elset=PLIES, generate
1, 89888, 1
*Elset, elset=LAYER1, generate
1, 11236, 1
*Elset, elset=LAYER2, generate
11237, 22472, 1
*Elset, elset=LAYER3, generate
22473, 33708, 1
*Elset, elset=LAYER4, generate
33709, 44944, 1
*Elset, elset=LAYER5, generate
44945, 56180, 1
*Elset, elset=LAYER6, generate
56181, 67416, 1
*Elset, elset=LAYER7, generate
67417, 78652, 1
*Elset, elset=LAYER8, generate
78653, 89888, 1
*Surface, type=ELEMENT, name=TOP
LAYER8, S2
*Surface, type=ELEMENT, name=IFACE1_LOWER
LAYER1, S2
*Surface, type=ELEMENT, name=IFACE1_UPPER
LAYER2, S1
*Surface, type=ELEMENT, name=IFACE2_LOWER
LAYER2, S2
*Surface, type=ELEMENT, name=IFACE2_UPPER
LAYER3, S1
*Surface, type=ELEMENT, name=IFACE3_LOWER
LAYER3, S2
*Surface, type=ELEMENT, name=IFACE3_UPPER
LAYER4, S1
*Surface, type=ELEMENT, name=IFACE4_LOWER
LAYER4, S2
*Surface, type=ELEMENT, name=IFACE4_UPPER
LAYER5, S1
*Surface, type=ELEMENT, name=IFACE5_LOWER
LAYER5, S2
*Surface, type=ELEMENT, name=IFACE5_UPPER
LAYER6, S1
*Surface, type=ELEMENT, name=IFACE6_LOWER
LAYER6, S2
*Surface, type=ELEMENT, name=IFACE6_UPPER
LAYER7, S1
*Surface, type=ELEMENT, name=IFACE7_LOWER
LAYER7, S2
*Surface, type=ELEMENT, name=IFACE7_UPPER
LAYER8, S1
*Elset, elset=BALL, generate
89889, 100688, 1
*Surface, type=ELEMENT, name=BALLFACETS
BALL
*Rigid Body, ref node=193867, elset=BALL
*Nset, nset=SENSOR_ACT
177427,
*Elset, elset=SENSOR_ACT
84291,
*Nset, nset=SENSOR_R1
177485,
*Elset, elset=SENSOR_R1
84349,
*Nset, nset=SENSOR_R2
177497,
*Elset, elset=SENSOR_R2
84361,
*Nset, nset=SENSOR_R3
173929,
*Elset, elset=SENSOR_R3
80826,
*Nset, nset=SENSOR_R4
180991,
*Elset, elset=SENSOR_R4
87822,
*Nset, nset=SENSOR_R5
173962,
*Elset, elset=SENSOR_R5
80859,
*Nset, nset=SENSOR_R6
181024,
*Elset, elset=SENSOR_R6
87855,
*Nset, nset=SENSOR_R7
173896,
*Elset, elset=SENSOR_R7
80793,
*Nset, nset=SENSOR_R8
180958,
*Elset, elset=SENSOR_R8
87789,
*Elset, elset=PATCH
83124, 83125, 83229, 83230, 83231, 83335
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*Surface, type=ELEMENT, name=PATCH
PATCH, S2
*Nset, nset=FRAME
1, 2, 3, 4, 5, 6
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*Nset, nset=BALLREF
193867,
*Nset, nset=TOPCENTRE
177460,
*Orientation, name=Fibre
1., 0., 0., 0., 1., 0.
3, 0.
*Section Controls, name=SC, max degradation=1.0
*Solid Section, elset=PLIES, material=PLY, orientation=Fibre, controls=SC
,
*Material, name=PLY
*Density
1650.0,
*Elastic, type=ENGINEERING CONSTANTS
1.281e11, 8.2e9, 8.2e9, 0.27, 0.27, 0.20, 4.7e9, 4.7e9
3.44e9,
** Diagnostic only: the failure index locates intralaminar failure but,
** as check_damage_degradation.py shows, it does not degrade a solid
** element. The stiffness reduction comes from the cohesive interfaces.
*Damage Initiation, criterion=MAX STRESS
1.5e9, 1.2e9, 5.0e7, 2.0e8, 5.0e7, 2.0e8, 7.0e7, 7.0e7,
5.0e7
*Damage Evolution, type=ENERGY
9.16e4
** Interface: contact-based cohesive behaviour. There is no cohesive
** element and therefore no cohesive material; the traction-separation
** law, its initiation criterion and its evolution all live on the
** surface interaction. Omitting the data line on *COHESIVE BEHAVIOR
** means the default penalty stiffness is used, so none has to be invented.
*Surface Interaction, name=DELAM
*Cohesive Behavior
*Damage Initiation, criterion=QUADS
59.5e6, 59.5e6, 59.5e6
*Damage Evolution, type=ENERGY, mixed mode behavior=BK, power=2.284
490.0, 1060.0, 1060.0
*Mass, elset=BALLMASS
3.967622e-03,
** Rotational inertia of a solid sphere, 2/5 m r^2. A central impact
** does not spin the ball; the value is here so the rigid body is well
** posed.
*Rotary Inertia, elset=BALLINERTIA
2.539278e-08, 2.539278e-08, 2.539278e-08
*Initial Conditions, type=VELOCITY
193867, 3, -1.229630e+01
*Surface Interaction, name=FRIC
*Friction
0.3,
*Contact, op=NEW
*Contact Inclusions
IFACE1_LOWER, IFACE1_UPPER
IFACE2_LOWER, IFACE2_UPPER
IFACE3_LOWER, IFACE3_UPPER
IFACE4_LOWER, IFACE4_UPPER
IFACE5_LOWER, IFACE5_UPPER
IFACE6_LOWER, IFACE6_UPPER
IFACE7_LOWER, IFACE7_UPPER
TOP, BALLFACETS
** The blanket friction assignment comes first and the interface pairs
** after it, because a later assignment takes precedence over an earlier
** one for the same pair.
*Contact Property Assignment
 ,  , FRIC
IFACE1_UPPER, IFACE1_LOWER, DELAM
IFACE2_UPPER, IFACE2_LOWER, DELAM
IFACE3_UPPER, IFACE3_LOWER, DELAM
IFACE4_UPPER, IFACE4_LOWER, DELAM
IFACE5_UPPER, IFACE5_LOWER, DELAM
IFACE6_UPPER, IFACE6_LOWER, DELAM
IFACE7_UPPER, IFACE7_LOWER, DELAM
*Amplitude, name=BURST, time=STEP TIME
0, 0
5e-07, 0.0003048872
1e-06, 0.002317431
1.5e-06, 0.007164958
2e-06, 0.01493959
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5e-05, -0
*Step, name=IMPACT, nlgeom=NO
*Dynamic, Explicit
, 0.0005
*Bulk Viscosity
0.06, 1.2
*Boundary
FRAME, ENCASTRE
*Output, field, number interval=25
*Node Output
U, V
*Element Output
S, SDEG
*Contact Output
** CSDMG is the interface damage variable for contact-based cohesive
** behaviour; it is to the surface what SDEG is to a cohesive element,
** and it is the variable the interface damage area is read from.
CSTRESS, CDISP, CSDMG
*Output, history, time interval=5e-07
*Node Output, nset=BALLREF
V3
*Node Output, nset=TOPCENTRE
U3
*Energy Output
ALLKE, ALLIE, ALLSE, ALLAE, ALLDMD, ALLPD, ALLWK, ETOTAL
*End Step
*Step, name=WAVE, nlgeom=NO
*Dynamic, Explicit
, 0.00025
*Bulk Viscosity
0.06, 1.2
*Boundary
FRAME, ENCASTRE
*Dsload, op=NEW, amplitude=BURST
PATCH, P, 3.535697e+05
*Output, field, number interval=25
*Node Output
U, V
*Output, history, time interval=5e-07
*Node Output, nset=SENSOR_ACT
U3, V3
*Element Output, elset=SENSOR_ACT
E11, E22, E12
*Node Output, nset=SENSOR_R1
U3, V3
*Element Output, elset=SENSOR_R1
E11, E22, E12
*Node Output, nset=SENSOR_R2
U3, V3
*Element Output, elset=SENSOR_R2
E11, E22, E12
*Node Output, nset=SENSOR_R3
U3, V3
*Element Output, elset=SENSOR_R3
E11, E22, E12
*Node Output, nset=SENSOR_R4
U3, V3
*Element Output, elset=SENSOR_R4
E11, E22, E12
*Node Output, nset=SENSOR_R5
U3, V3
*Element Output, elset=SENSOR_R5
E11, E22, E12
*Node Output, nset=SENSOR_R6
U3, V3
*Element Output, elset=SENSOR_R6
E11, E22, E12
*Node Output, nset=SENSOR_R7
U3, V3
*Element Output, elset=SENSOR_R7
E11, E22, E12
*Node Output, nset=SENSOR_R8
U3, V3
*Element Output, elset=SENSOR_R8
E11, E22, E12
*Energy Output
ALLKE, ALLIE, ALLSE, ALLAE, ALLDMD, ALLPD, ALLWK, ETOTAL
*End Step
