*Heading
** Stable-increment probe at the real element sizes: one 1.25 x 1.25 x 0.25 mm solid
** element with one zero-thickness cohesive element on top of it, which is what the
** coupon model is made of. The initial stable increment printed in the .sta isolates
** which of the two element types sets the step, and how the cohesive section's
** constitutive thickness enters it.
*Preprint, echo=NO, model=NO, history=NO, contact=NO
*Node
1, 0., 0., 0.
2, 1.25e-3, 0., 0.
3, 1.25e-3, 1.25e-3, 0.
4, 0., 1.25e-3, 0.
5, 0., 0., 0.25e-3
6, 1.25e-3, 0., 0.25e-3
7, 1.25e-3, 1.25e-3, 0.25e-3
8, 0., 1.25e-3, 0.25e-3
9, 0., 0., 0.25e-3
10, 1.25e-3, 0., 0.25e-3
11, 1.25e-3, 1.25e-3, 0.25e-3
12, 0., 1.25e-3, 0.25e-3
*Element, type=C3D8
1, 1, 2, 3, 4, 5, 6, 7, 8
*Element, type=COH3D8
2, 5, 6, 7, 8, 9, 10, 11, 12
*Elset, elset=SOLID
1,
*Elset, elset=COH
2,
*Nset, nset=BASE
1, 2, 3, 4
*Orientation, name=Fibre
1., 0., 0., 0., 1., 0.
3, 0.
*Solid Section, elset=SOLID, material=PLY, orientation=Fibre
,
*Cohesive Section, elset=COH, material=IFACE, response=TRACTION SEPARATION
THICKNESS,
*Material, name=PLY
*Density
1650.,
*Elastic, type=ENGINEERING CONSTANTS
1.281e11, 8.2e9, 8.2e9, 0.27, 0.27, 0.20, 4.7e9, 4.7e9
3.44e9,
*Material, name=IFACE
*Density
1650.,
*Elastic, type=TRACTION
1e16, 1e16, 1e16
*Step, name=S1, nlgeom=NO
*Dynamic, Explicit
, 1e-9
*Boundary
BASE, ENCASTRE
*Output, history
*Energy Output
ALLKE, ALLIE
*End Step
