*Heading
** Ball-drop impact on a 100 x 100 x 2 mm coupon, 2 plies, cohesive between
** them, generated by make_impact_wave_inp.py. Impact stage only.
** In-plane 25 mm: set by ten elements per A0 wavelength at 100 kHz, which
** is the rule the validated wave models use, so one mesh serves both stages.
*Preprint, echo=NO, model=NO, history=NO, contact=NO
*Node
1, 0, 0, 0
2, 0.025, 0, 0
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** solid elements, one per ply
*Element, type=C3D8
1, 1, 2, 7, 6, 26, 27, 32, 31
2, 2, 3, 8, 7, 27, 28, 33, 32
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** zero-thickness cohesive elements at each ply boundary
*Element, type=COH3D8
33, 26, 27, 32, 31, 51, 52, 57, 56
34, 27, 28, 33, 32, 52, 53, 58, 57
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** rigid facets of the ball
*Element, type=R3D4
169, 101, 102, 222, 221
170, 102, 103, 223, 222
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*Element, type=R3D3
49, 100, 102, 101
50, 100, 103, 102
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*Element, type=MASS
10849, 10783
*Element, type=ROTARYI
10850, 10783
*Elset, elset=BALLMASS
10849,
*Elset, elset=BALLINERTIA
10850,
*Elset, elset=PLIES, generate
1, 32, 1
*Elset, elset=INTERFACES, generate
33, 48, 1
*Elset, elset=IFACE1
33, 34, 35, 36, 37, 38, 39, 40, 41, 42, 43, 44, 45, 46, 47, 48,
*Elset, elset=BALL, generate
49, 10848, 1
*Rigid Body, ref node=10783, elset=BALL
*Nset, nset=FRAME
1, 2, 3, 4, 5, 6
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*Nset, nset=BALLREF
10783,
*Nset, nset=TOPCENTRE
88,
*Orientation, name=Fibre
1., 0., 0., 0., 1., 0.
3, 0.
*Section Controls, name=SC, max degradation=1.0
*Solid Section, elset=PLIES, material=PLY, orientation=Fibre, controls=SC
,
*Cohesive Section, elset=INTERFACES, material=IFACE, response=TRACTION SEPARATION, controls=SC
1.0,
*Material, name=PLY
*Density
1650.0,
*Elastic, type=ENGINEERING CONSTANTS
1.281e11, 8.2e9, 8.2e9, 0.27, 0.27, 0.20, 4.7e9, 4.7e9
3.44e9,
** Diagnostic only: the failure index locates intralaminar failure but,
** as check_damage_degradation.py shows, it does not degrade a solid
** element. The stiffness reduction comes from the cohesive interfaces.
*Damage Initiation, criterion=MAX STRESS
1.5e9, 1.2e9, 5.0e7, 2.0e8, 5.0e7, 2.0e8, 7.0e7, 7.0e7,
5.0e7
*Damage Evolution, type=ENERGY
9.16e4
*Material, name=IFACE
*Density
1650.0,
*Elastic, type=TRACTION
1e+16, 1e+16, 1e+16
*Damage Initiation, criterion=QUADS
30e6, 30e6, 30e6
*Damage Evolution, type=ENERGY, mixed mode behavior=BK, power=2
1.0e3, 1.0e3, 1.0e3
*Mass, elset=BALLMASS
3.967622e-03,
** Rotational inertia of a solid sphere, 2/5 m r^2. A central impact does
** not spin the ball; the value is here so the rigid body is well posed.
*Rotary Inertia, elset=BALLINERTIA
2.539278e-08, 2.539278e-08, 2.539278e-08
*Initial Conditions, type=VELOCITY
10783, 3, 3, -1.771476e+00
*Surface Interaction, name=FRIC
*Friction
0.3,
*Contact, op=NEW
*Contact Inclusions, ALL EXTERIOR
*Contact Property Assignment
 ,  , FRIC
*Step, name=IMPACT, nlgeom=NO
*Dynamic, Explicit
, 2e-05
*Bulk Viscosity
0.06, 1.2
*Boundary
FRAME, ENCASTRE
*Output, field, number interval=50
*Node Output
U, V
*Element Output
S, SDEG
*Contact Output
CSTRESS
*Output, history, time interval=5e-07
*Node Output, nset=BALLREF
V3
*Node Output, nset=TOPCENTRE
U3
*Energy Output
ALLKE, ALLIE, ALLSE, ALLAE, ALLDMD, ALLPD, ALLWK, ETOTAL
*End Step
