*Heading
** Guided wave stage on a 100 x 100 x 2 mm coupon, 8 plies, contact-based cohesive between
** them, generated by make_impact_wave_inp.py.
** In-plane 1.26895 mm at the edges: set by ten elements per A0 wavelength at
** 100 kHz, the rule the validated wave models use, so one mesh serves both
** stages. In-plane 0.15 mm at the centre, where the ball contacts.
*Preprint, echo=NO, model=NO, history=NO, contact=NO
*Node
1, 4.163336342e-17, 4.163336342e-17, 0
2, 0.001268951545, 4.163336342e-17, 0
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** solid elements, one per ply
*Element, type=C3D8
1, 1, 2, 109, 108, 11450, 11451, 11558, 11557
2, 2, 3, 110, 109, 11451, 11452, 11559, 11558
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*Elset, elset=PLIES, generate
1, 89888, 1
*Elset, elset=LAYER1, generate
1, 11236, 1
*Elset, elset=LAYER2, generate
11237, 22472, 1
*Elset, elset=LAYER3, generate
22473, 33708, 1
*Elset, elset=LAYER4, generate
33709, 44944, 1
*Elset, elset=LAYER5, generate
44945, 56180, 1
*Elset, elset=LAYER6, generate
56181, 67416, 1
*Elset, elset=LAYER7, generate
67417, 78652, 1
*Elset, elset=LAYER8, generate
78653, 89888, 1
*Surface, type=ELEMENT, name=TOP
LAYER8, S2
*Elset, elset=IFACE1_IN_LOWER
4290, 4291, 4292, 4293, 4294, 4295
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*Elset, elset=IFACE1_IN_UPPER
15526, 15527, 15528, 15529, 15530, 15531
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*Surface, type=ELEMENT, name=IFACE1_IN_LOWER
IFACE1_IN_LOWER, S2
*Surface, type=ELEMENT, name=IFACE1_IN_UPPER
IFACE1_IN_UPPER, S1
*Elset, elset=IFACE1_OUT_LOWER
1, 2, 3, 4, 5, 6
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*Elset, elset=IFACE1_OUT_UPPER
11237, 11238, 11239, 11240, 11241, 11242
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*Surface, type=ELEMENT, name=IFACE1_OUT_LOWER
IFACE1_OUT_LOWER, S2
*Surface, type=ELEMENT, name=IFACE1_OUT_UPPER
IFACE1_OUT_UPPER, S1
*Elset, elset=IFACE2_IN_LOWER
15526, 15527, 15528, 15529, 15530, 15531
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*Elset, elset=IFACE2_IN_UPPER
26762, 26763, 26764, 26765, 26766, 26767
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*Surface, type=ELEMENT, name=IFACE2_IN_LOWER
IFACE2_IN_LOWER, S2
*Surface, type=ELEMENT, name=IFACE2_IN_UPPER
IFACE2_IN_UPPER, S1
*Elset, elset=IFACE2_OUT_LOWER
11237, 11238, 11239, 11240, 11241, 11242
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*Elset, elset=IFACE2_OUT_UPPER
22473, 22474, 22475, 22476, 22477, 22478
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*Surface, type=ELEMENT, name=IFACE2_OUT_LOWER
IFACE2_OUT_LOWER, S2
*Surface, type=ELEMENT, name=IFACE2_OUT_UPPER
IFACE2_OUT_UPPER, S1
*Elset, elset=IFACE3_IN_LOWER
26762, 26763, 26764, 26765, 26766, 26767
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*Elset, elset=IFACE3_IN_UPPER
37998, 37999, 38000, 38001, 38002, 38003
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*Surface, type=ELEMENT, name=IFACE3_IN_LOWER
IFACE3_IN_LOWER, S2
*Surface, type=ELEMENT, name=IFACE3_IN_UPPER
IFACE3_IN_UPPER, S1
*Elset, elset=IFACE3_OUT_LOWER
22473, 22474, 22475, 22476, 22477, 22478
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*Elset, elset=IFACE3_OUT_UPPER
33709, 33710, 33711, 33712, 33713, 33714
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*Surface, type=ELEMENT, name=IFACE3_OUT_LOWER
IFACE3_OUT_LOWER, S2
*Surface, type=ELEMENT, name=IFACE3_OUT_UPPER
IFACE3_OUT_UPPER, S1
*Elset, elset=IFACE4_IN_LOWER
37998, 37999, 38000, 38001, 38002, 38003
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*Elset, elset=IFACE4_IN_UPPER
49234, 49235, 49236, 49237, 49238, 49239
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*Surface, type=ELEMENT, name=IFACE4_IN_LOWER
IFACE4_IN_LOWER, S2
*Surface, type=ELEMENT, name=IFACE4_IN_UPPER
IFACE4_IN_UPPER, S1
*Elset, elset=IFACE4_OUT_LOWER
33709, 33710, 33711, 33712, 33713, 33714
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*Elset, elset=IFACE4_OUT_UPPER
44945, 44946, 44947, 44948, 44949, 44950
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*Surface, type=ELEMENT, name=IFACE4_OUT_LOWER
IFACE4_OUT_LOWER, S2
*Surface, type=ELEMENT, name=IFACE4_OUT_UPPER
IFACE4_OUT_UPPER, S1
*Elset, elset=IFACE5_IN_LOWER
49234, 49235, 49236, 49237, 49238, 49239
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*Elset, elset=IFACE5_IN_UPPER
60470, 60471, 60472, 60473, 60474, 60475
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*Surface, type=ELEMENT, name=IFACE5_IN_LOWER
IFACE5_IN_LOWER, S2
*Surface, type=ELEMENT, name=IFACE5_IN_UPPER
IFACE5_IN_UPPER, S1
*Elset, elset=IFACE5_OUT_LOWER
44945, 44946, 44947, 44948, 44949, 44950
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*Elset, elset=IFACE5_OUT_UPPER
56181, 56182, 56183, 56184, 56185, 56186
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*Surface, type=ELEMENT, name=IFACE5_OUT_LOWER
IFACE5_OUT_LOWER, S2
*Surface, type=ELEMENT, name=IFACE5_OUT_UPPER
IFACE5_OUT_UPPER, S1
*Elset, elset=IFACE6_IN_LOWER
60470, 60471, 60472, 60473, 60474, 60475
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*Elset, elset=IFACE6_IN_UPPER
71706, 71707, 71708, 71709, 71710, 71711
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*Surface, type=ELEMENT, name=IFACE6_IN_LOWER
IFACE6_IN_LOWER, S2
*Surface, type=ELEMENT, name=IFACE6_IN_UPPER
IFACE6_IN_UPPER, S1
*Elset, elset=IFACE6_OUT_LOWER
56181, 56182, 56183, 56184, 56185, 56186
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*Elset, elset=IFACE6_OUT_UPPER
67417, 67418, 67419, 67420, 67421, 67422
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*Surface, type=ELEMENT, name=IFACE6_OUT_LOWER
IFACE6_OUT_LOWER, S2
*Surface, type=ELEMENT, name=IFACE6_OUT_UPPER
IFACE6_OUT_UPPER, S1
*Elset, elset=IFACE7_IN_LOWER
71706, 71707, 71708, 71709, 71710, 71711
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*Elset, elset=IFACE7_IN_UPPER
82942, 82943, 82944, 82945, 82946, 82947
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*Surface, type=ELEMENT, name=IFACE7_IN_LOWER
IFACE7_IN_LOWER, S2
*Surface, type=ELEMENT, name=IFACE7_IN_UPPER
IFACE7_IN_UPPER, S1
*Elset, elset=IFACE7_OUT_LOWER
67417, 67418, 67419, 67420, 67421, 67422
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*Elset, elset=IFACE7_OUT_UPPER
78653, 78654, 78655, 78656, 78657, 78658
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*Surface, type=ELEMENT, name=IFACE7_OUT_LOWER
IFACE7_OUT_LOWER, S2
*Surface, type=ELEMENT, name=IFACE7_OUT_UPPER
IFACE7_OUT_UPPER, S1
*Nset, nset=SENSOR_ACT
177427,
*Elset, elset=SENSOR_ACT
84291,
*Nset, nset=SENSOR_R1
177485,
*Elset, elset=SENSOR_R1
84349,
*Nset, nset=SENSOR_R2
177497,
*Elset, elset=SENSOR_R2
84361,
*Nset, nset=SENSOR_R3
173929,
*Elset, elset=SENSOR_R3
80826,
*Nset, nset=SENSOR_R4
180991,
*Elset, elset=SENSOR_R4
87822,
*Nset, nset=SENSOR_R5
173962,
*Elset, elset=SENSOR_R5
80859,
*Nset, nset=SENSOR_R6
181024,
*Elset, elset=SENSOR_R6
87855,
*Nset, nset=SENSOR_R7
173896,
*Elset, elset=SENSOR_R7
80793,
*Nset, nset=SENSOR_R8
180958,
*Elset, elset=SENSOR_R8
87789,
*Elset, elset=PATCH
83124, 83125, 83229, 83230, 83231, 83335
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*Surface, type=ELEMENT, name=PATCH
PATCH, S2
*Nset, nset=FRAME
1, 2, 3, 4, 5, 6
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*Nset, nset=TOPCENTRE
177460,
*Orientation, name=Fibre
1., 0., 0., 0., 1., 0.
3, 0.
*Section Controls, name=SC, max degradation=1.0
*Solid Section, elset=PLIES, material=PLY, orientation=Fibre, controls=SC
,
*Material, name=PLY
*Density
1650.0,
*Elastic, type=ENGINEERING CONSTANTS
1.281e11, 8.2e9, 8.2e9, 0.27, 0.27, 0.20, 4.7e9, 4.7e9
3.44e9,
** Diagnostic only: the failure index locates intralaminar failure but,
** as check_damage_degradation.py shows, it does not degrade a solid
** element. The stiffness reduction comes from the cohesive interfaces.
*Damage Initiation, criterion=MAX STRESS
1.5e9, 1.2e9, 5.0e7, 2.0e8, 5.0e7, 2.0e8, 7.0e7, 7.0e7,
5.0e7
*Damage Evolution, type=ENERGY
9.16e4
** Interface: contact-based cohesive behaviour. There is no cohesive
** element and therefore no cohesive material; the traction-separation
** law, its initiation criterion and its evolution all live on the
** surface interaction. The penalty stiffness used to be left to the
** Abaqus default on the argument that none then had to be invented, which
** turned out to be the wrong call: on the refined mesh the interface mode
** that default creates is too stiff for the stable increment and the wave
** solution drifts asymmetric. --cohesive-stiffness ply sets it from the
** ply moduli instead. See cohesive_stiffness() above.
*Surface Interaction, name=DELAM
*Cohesive Behavior
2.37e+13, 2.37e+13, 2.37e+13
*Damage Initiation, criterion=QUADS
59.5e6, 59.5e6, 59.5e6
*Damage Evolution, type=ENERGY, mixed mode behavior=BK, power=2.284
490.0, 1060.0, 1060.0
*Surface Interaction, name=FRIC
*Friction
0.3,
*Contact, op=NEW
*Contact Inclusions
IFACE1_IN_LOWER, IFACE1_IN_UPPER
IFACE1_OUT_LOWER, IFACE1_OUT_UPPER
IFACE2_IN_LOWER, IFACE2_IN_UPPER
IFACE2_OUT_LOWER, IFACE2_OUT_UPPER
IFACE3_IN_LOWER, IFACE3_IN_UPPER
IFACE3_OUT_LOWER, IFACE3_OUT_UPPER
IFACE4_IN_LOWER, IFACE4_IN_UPPER
IFACE4_OUT_LOWER, IFACE4_OUT_UPPER
IFACE5_IN_LOWER, IFACE5_IN_UPPER
IFACE5_OUT_LOWER, IFACE5_OUT_UPPER
IFACE6_IN_LOWER, IFACE6_IN_UPPER
IFACE6_OUT_LOWER, IFACE6_OUT_UPPER
IFACE7_IN_LOWER, IFACE7_IN_UPPER
IFACE7_OUT_LOWER, IFACE7_OUT_UPPER
** The blanket friction assignment comes first and the interface pairs
** after it, because a later assignment takes precedence over an earlier
** one for the same pair.
*Contact Property Assignment
 ,  , FRIC
IFACE1_IN_UPPER, IFACE1_IN_LOWER, FRIC
IFACE1_OUT_UPPER, IFACE1_OUT_LOWER, DELAM
IFACE2_IN_UPPER, IFACE2_IN_LOWER, FRIC
IFACE2_OUT_UPPER, IFACE2_OUT_LOWER, DELAM
IFACE3_IN_UPPER, IFACE3_IN_LOWER, FRIC
IFACE3_OUT_UPPER, IFACE3_OUT_LOWER, DELAM
IFACE4_IN_UPPER, IFACE4_IN_LOWER, FRIC
IFACE4_OUT_UPPER, IFACE4_OUT_LOWER, DELAM
IFACE5_IN_UPPER, IFACE5_IN_LOWER, FRIC
IFACE5_OUT_UPPER, IFACE5_OUT_LOWER, DELAM
IFACE6_IN_UPPER, IFACE6_IN_LOWER, FRIC
IFACE6_OUT_UPPER, IFACE6_OUT_LOWER, DELAM
IFACE7_IN_UPPER, IFACE7_IN_LOWER, FRIC
IFACE7_OUT_UPPER, IFACE7_OUT_LOWER, DELAM
*Amplitude, name=BURST, time=STEP TIME
0, 0
5e-07, 0.0003048872
1e-06, 0.002317431
1.5e-06, 0.007164958
2e-06, 0.01493959
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5e-05, -0
*Step, name=WAVE, nlgeom=NO
*Dynamic, Explicit
, 0.00025
*Bulk Viscosity
0.06, 1.2
*Boundary
FRAME, ENCASTRE
*Dsload, op=NEW, amplitude=BURST
PATCH, P, 3.535697e+05
*Output, field, number interval=25
*Node Output
U, V
*Output, history, time interval=5e-07
*Node Output, nset=SENSOR_ACT
U3, V3
*Element Output, elset=SENSOR_ACT
E11, E22, E12
*Node Output, nset=SENSOR_R1
U3, V3
*Element Output, elset=SENSOR_R1
E11, E22, E12
*Node Output, nset=SENSOR_R2
U3, V3
*Element Output, elset=SENSOR_R2
E11, E22, E12
*Node Output, nset=SENSOR_R3
U3, V3
*Element Output, elset=SENSOR_R3
E11, E22, E12
*Node Output, nset=SENSOR_R4
U3, V3
*Element Output, elset=SENSOR_R4
E11, E22, E12
*Node Output, nset=SENSOR_R5
U3, V3
*Element Output, elset=SENSOR_R5
E11, E22, E12
*Node Output, nset=SENSOR_R6
U3, V3
*Element Output, elset=SENSOR_R6
E11, E22, E12
*Node Output, nset=SENSOR_R7
U3, V3
*Element Output, elset=SENSOR_R7
E11, E22, E12
*Node Output, nset=SENSOR_R8
U3, V3
*Element Output, elset=SENSOR_R8
E11, E22, E12
*Energy Output
ALLKE, ALLIE, ALLSE, ALLAE, ALLDMD, ALLPD, ALLWK, ETOTAL
*End Step
